# OpenSim document version 40600
Model bouncing_ball:
  gravity: 0 -9.81 0
  PhysicalOffsetFrame floor_visual: socket_parent=/ground translation=(0 0.025 0) [meters]
    Brick floor_visual_geom_1: half_lengths=(1 0.025 1)
  Ground
  BodySet:
    Body ball: mass=0.6 [kg] mass_center=(0 0 0) inertia=(0.00576 0.00576 0.00576 0 0 0)
      Sphere ball_geom_1: radius=0.12
  JointSet:
    SliderJoint up_down: socket_parent_frame=ground_offset socket_child_frame=ball_offset
      Coordinate ball_height: default_value=1.17 range=(0 3)
      PhysicalOffsetFrame ground_offset: socket_parent=/ground translation=(0 0 0) orientation=(0 0 1.570796) [radians]
      PhysicalOffsetFrame ball_offset: socket_parent=/bodyset/ball translation=(0 0 0) orientation=(0 0 1.570796)
  ForceSet:
    HuntCrossleyForce contact:
      ContactParametersSet contact_parameters:
        ContactParameters: geometry=(ball_contact floor) stiffness=10000000 dissipation=0.05 static_friction=0
            dynamic_friction=0 viscous_friction=0
  ContactGeometrySet:
    ContactHalfSpace floor: socket_frame=/ground location=(0 0.05 0) orientation=(0 0 -1.570796)
    ContactSphere ball_contact: socket_frame=/bodyset/ball location=(0 0 0) radius=0.12
