# OpenSim document version 40600
Model bounce_pass:
  gravity: 0 -9.81 0
  PhysicalOffsetFrame floor_visual: socket_parent=/ground translation=(0 0.025 0) [meters]
    Brick floor_visual_geom_1: half_lengths=(10 0.025 10)
  Ground
  BodySet:
    Body ball: mass=0.6 [kg] mass_center=(0 0 0) inertia=(0.00576 0.00576 0.00576 0 0 0)
      Sphere ball_geom_1: radius=0.12
  JointSet:
    CustomJoint bounce_pass: socket_parent_frame=/ground socket_child_frame=/bodyset/ball
      Coordinate ball_x: default_speed_value=3 range=(-20 20)
      Coordinate ball_y: default_value=1.17 range=(0 3)
      Coordinate ball_z: range=(-20 20)
      SpatialTransform:
        TransformAxis rotation1: axis=(1 0 0)
        TransformAxis rotation2: axis=(0 1 0)
        TransformAxis rotation3: axis=(0 0 1)
        TransformAxis translation1: coordinates=ball_x axis=(1 0 0) LinearFunction(coefficients=1 0)
        TransformAxis translation2: coordinates=ball_y axis=(0 1 0) LinearFunction(coefficients=1 0)
        TransformAxis translation3: coordinates=ball_z axis=(0 0 1) LinearFunction(coefficients=1 0)
  ForceSet:
    HuntCrossleyForce contact:
      ContactParametersSet contact_parameters:
        ContactParameters: geometry=(ball_contact floor) stiffness=10000000 dissipation=0.05 static_friction=0.2
            dynamic_friction=0.15 viscous_friction=0
  ContactGeometrySet:
    ContactHalfSpace floor: socket_frame=/ground location=(0 0.05 0) orientation=(0 0 -1.570796)
    ContactSphere ball_contact: socket_frame=/bodyset/ball location=(0 0 0) radius=0.12
